*Heading
** DFE2 Multi-scale Model - Generated by micro_RVE_placement_3D.py
** Macro model: TRC_Macro_3D.inp
** RVE model: TRC_RVE.inp
** Number of macro elements: 18
** Number of Gauss points per element: 1
** Total RVE instances: 18
** RVE dimensions: 5.5 x 5.5 x 6.69 mm
**
*Preprint, echo=NO, model=NO, history=NO, contact=NO
**
** =============================================================
** PART: MACRO MODEL (beam)
** =============================================================
*Part, name=beam
*Node
     1,   0.0000000000,   0.0000000000,   0.0000000000
     2,   5.5000000000,   0.0000000000,   0.0000000000
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**
*Element, type=C3D8R
     1,      1,      2,      4,      3,     39,     40,     42,     41
     2,      3,      4,      6,      5,     41,     42,     44,     43
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**
** Node sets for reference points
*Nset, nset=RP_E1_GP1
1076, 1077, 1078, 1079, 1080, 1081, 1082, 1083
*Nset, nset=RP_E2_GP1
1084, 1085, 1086, 1087, 1088, 1089, 1090, 1091
*Nset, nset=RP_E3_GP1
1092, 1093, 1094, 1095, 1096, 1097, 1098, 1099
*Nset, nset=RP_E4_GP1
1100, 1101, 1102, 1103, 1104, 1105, 1106, 1107
*Nset, nset=RP_E5_GP1
1108, 1109, 1110, 1111, 1112, 1113, 1114, 1115
*Nset, nset=RP_E6_GP1
1116, 1117, 1118, 1119, 1120, 1121, 1122, 1123
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*End Part
**
** =============================================================
** PARTS: RVE COMPONENTS
** =============================================================
*Part, name=Matrice
*Node
     1,   3.1329994000,   2.7500000000,   0.0000000000
     2,   3.0208206000,   3.0208225000,   0.0000000000
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*Element, type=C3D8R
     1, 30, 31, 68, 58, 166, 167, 204, 194
     2, 95, 50, 77, 101, 231, 186, 213, 237
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**
** Corner node sets for PBC
*Nset, nset=V1
12
*Nset, nset=V2
11
*Nset, nset=V3
9
*Nset, nset=V4
10
*Nset, nset=V5
1372
*Nset, nset=V6
1371
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*End Part
**
*Part, name=Fibre
*Node
     1,   3.1242472530,   2.6685874909,   0.0000000000
     2,   3.1088517310,   2.8838447780,   0.0000000000
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*Element, type=C3D8R
     1, 76, 105, 88, 87, 11, 40, 23, 22
     2, 89, 75, 74, 107, 24, 10, 9, 42
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**
** Corner node sets for PBC
**
** Face node sets for PBC
*Nset, nset=FACE_ZN
1, 2, 3, 4, 5, 6
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*Nset, nset=FACE_ZP
3966, 3967, 3968, 3969, 3970, 3971
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*End Part
**
** =============================================================
** ASSEMBLY
** =============================================================
*Assembly, name=Assembly
**
*Instance, name=MACRO-1, part=beam
*End Instance
**
** RVE instances at Gauss points
*Instance, name=Matrice_E1_GP1, part=Matrice
    0.0000000000,   0.0000000000,   0.0000000000
*End Instance
*Instance, name=Fibre_E1_GP1, part=Fibre
    0.0000000000,   0.0000000000,   0.0000000000
*End Instance
*Instance, name=Matrice_E2_GP1, part=Matrice
    0.0000000000,   5.5000000000,   0.0000000000
*End Instance
*Instance, name=Fibre_E2_GP1, part=Fibre
    0.0000000000,   5.5000000000,   0.0000000000
*End Instance
*Instance, name=Matrice_E3_GP1, part=Matrice
    0.0000000000,  11.0000000000,   0.0000000000
*End Instance
*Instance, name=Fibre_E3_GP1, part=Fibre
    0.0000000000,  11.0000000000,   0.0000000000
*End Instance
*Instance, name=Matrice_E4_GP1, part=Matrice
    0.0000000000,  16.5000000000,   0.0000000000
*End Instance
*Instance, name=Fibre_E4_GP1, part=Fibre
    0.0000000000,  16.5000000000,   0.0000000000
*End Instance
*Instance, name=Matrice_E5_GP1, part=Matrice
    0.0000000000,  22.0000000000,   0.0000000000
*End Instance
*Instance, name=Fibre_E5_GP1, part=Fibre
    0.0000000000,  22.0000000000,   0.0000000000
*End Instance
*Instance, name=Matrice_E6_GP1, part=Matrice
    0.0000000000,  27.5000000000,   0.0000000000
*End Instance
*Instance, name=Fibre_E6_GP1, part=Fibre
    0.0000000000,  27.5000000000,   0.0000000000
*End Instance
*Instance, name=Matrice_E7_GP1, part=Matrice
    0.0000000000,  33.0000000000,   0.0000000000
*End Instance
*Instance, name=Fibre_E7_GP1, part=Fibre
    0.0000000000,  33.0000000000,   0.0000000000
*End Instance
*Instance, name=Matrice_E8_GP1, part=Matrice
    0.0000000000,  38.5000000000,   0.0000000000
*End Instance
*Instance, name=Fibre_E8_GP1, part=Fibre
    0.0000000000,  38.5000000000,   0.0000000000
*End Instance
*Instance, name=Matrice_E9_GP1, part=Matrice
    0.0000000000,  44.0000000000,   0.0000000000
*End Instance
*Instance, name=Fibre_E9_GP1, part=Fibre
    0.0000000000,  44.0000000000,   0.0000000000
*End Instance
*Instance, name=Matrice_E10_GP1, part=Matrice
    0.0000000000,  49.5000000000,   0.0000000000
*End Instance
*Instance, name=Fibre_E10_GP1, part=Fibre
    0.0000000000,  49.5000000000,   0.0000000000
*End Instance
*Instance, name=Matrice_E11_GP1, part=Matrice
    0.0000000000,  55.0000000000,   0.0000000000
*End Instance
*Instance, name=Fibre_E11_GP1, part=Fibre
    0.0000000000,  55.0000000000,   0.0000000000
*End Instance
*Instance, name=Matrice_E12_GP1, part=Matrice
    0.0000000000,  60.5000000000,   0.0000000000
*End Instance
*Instance, name=Fibre_E12_GP1, part=Fibre
    0.0000000000,  60.5000000000,   0.0000000000
*End Instance
*Instance, name=Matrice_E13_GP1, part=Matrice
    0.0000000000,  66.0000000000,   0.0000000000
*End Instance
*Instance, name=Fibre_E13_GP1, part=Fibre
    0.0000000000,  66.0000000000,   0.0000000000
*End Instance
*Instance, name=Matrice_E14_GP1, part=Matrice
    0.0000000000,  71.5000000000,   0.0000000000
*End Instance
*Instance, name=Fibre_E14_GP1, part=Fibre
    0.0000000000,  71.5000000000,   0.0000000000
*End Instance
*Instance, name=Matrice_E15_GP1, part=Matrice
    0.0000000000,  77.0000000000,   0.0000000000
*End Instance
*Instance, name=Fibre_E15_GP1, part=Fibre
    0.0000000000,  77.0000000000,   0.0000000000
*End Instance
*Instance, name=Matrice_E16_GP1, part=Matrice
    0.0000000000,  82.5000000000,   0.0000000000
*End Instance
*Instance, name=Fibre_E16_GP1, part=Fibre
    0.0000000000,  82.5000000000,   0.0000000000
*End Instance
*Instance, name=Matrice_E17_GP1, part=Matrice
    0.0000000000,  88.0000000000,   0.0000000000
*End Instance
*Instance, name=Fibre_E17_GP1, part=Fibre
    0.0000000000,  88.0000000000,   0.0000000000
*End Instance
*Instance, name=Matrice_E18_GP1, part=Matrice
    0.0000000000,  93.5000000000,   0.0000000000
*End Instance
*Instance, name=Fibre_E18_GP1, part=Fibre
    0.0000000000,  93.5000000000,   0.0000000000
*End Instance
**
** Node sets for macro-micro coupling (assembly level)
*Nset, nset=MACRO_E1_GP1, instance=MACRO-1
1, 2, 4, 3, 39, 40, 42, 41
*Nset, nset=N1_E1_GP1, instance=MACRO-1
1
*Nset, nset=N2_E1_GP1, instance=MACRO-1
2
*Nset, nset=N3_E1_GP1, instance=MACRO-1
4
*Nset, nset=N4_E1_GP1, instance=MACRO-1
3
*Nset, nset=N5_E1_GP1, instance=MACRO-1
39
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**
*End Assembly
**
** =============================================================
** MATERIALS
** =============================================================
*Material, name=Fibre
*Elastic
200000., 0.2
**
*Material, name=Matrice
*Elastic
25000., 0.18
**
** =============================================================
** SECTION ASSIGNMENTS
** (To be completed in input_file_PBCs_3D.py)
** =============================================================
**
** =============================================================
** MPC EQUATIONS (To be added by input_file_PBCs_3D.py)
** =============================================================
**
