*Heading
** Job name: Job-1 Model name: Model-1
** Generated by: Abaqus/CAE 2025.HF3
*Preprint, echo=NO, model=NO, history=NO, contact=NO
**
** PARTS
**
*Part, name=Fibre
*Node
      1,  0.374247253, -0.0814125091,           0.
      2,  0.358851731,  0.133844778,           0.
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*Element, type=C3D8R
   1,   76,  105,   88,   87,   11,   40,   23,   22
   2,   89,   75,   74,  107,   24,   10,    9,   42
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*Nset, nset=Set-1, generate
    1,  4030,     1
*Elset, elset=Set-1, generate
    1,  3233,     1
** Section: Fibre
*Solid Section, elset=Set-1, material=Fibre
,
*End Part
**
*Part, name=Matrice
*Node
      1,   33.8829994,       -17.25,           0.
      2,   33.7708206,  -16.9791775,           0.
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*Element, type=C3D8R
   1,   30,   31,   68,   58,  166,  167,  204,  194
   2,   95,   50,   77,  101,  231,  186,  213,  237
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*Nset, nset=Set-1, generate
    1,  1496,     1
*Elset, elset=Set-1, generate
    1,  1160,     1
** Section: Matrice
*Solid Section, elset=Set-1, material=Matrice
,
*End Part
**
**
** ASSEMBLY
**
*Assembly, name=Assembly
**
*Instance, name=Part-1-1, part=Matrice
      -17.25,         33.5,         6.69
      -17.25,         33.5,         6.69, -16.5428932188134, 32.7928932188134,         6.69,         180.
*End Instance
**
*Instance, name=Part-2-1, part=Fibre
*End Instance
**
*Instance, name=Part-2-2, part=Fibre
*End Instance
**
*Nset, nset=Set-1, instance=Part-1-1, generate
   9,  136,    1
*Elset, elset=Set-1, instance=Part-1-1, generate
   1,  116,    1
*Nset, nset=Set-2, instance=Part-1-1, generate
 1361,  1496,     1
*Elset, elset=Set-2, instance=Part-1-1, generate
 1045,  1160,     1
*Nset, nset=Set-3, instance=Part-1-1
   11,   12,   27,   28,   29,   30
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*Elset, elset=Set-3, instance=Part-1-1
    1,   19,   24,   27,   29,   50
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*Nset, nset=Set-4, instance=Part-1-1
    9,   10,   13,   14,   15,   16
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*Elset, elset=Set-4, instance=Part-1-1
   13,   15,   23,   30,   47,   58
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*End Assembly
**
** MATERIALS
**
*Material, name=Fibre
*Elastic
200., 0.2
*Material, name=Matrice
*Elastic
25., 0.18
**
** BOUNDARY CONDITIONS
**
** Name: BC-1 Type: Symmetry/Antisymmetry/Encastre
*Boundary
Set-1, ENCASTRE
** Name: BC-2 Type: Displacement/Rotation
*Boundary
Set-2, 1, 1
Set-2, 2, 2
Set-2, 4, 4
Set-2, 5, 5
Set-2, 6, 6
** Name: BC-3 Type: Symmetry/Antisymmetry/Encastre
*Boundary
Set-3, XASYMM
** Name: BC-4 Type: Symmetry/Antisymmetry/Encastre
*Boundary
Set-4, XASYMM
** ----------------------------------------------------------------
**
** STEP: Step-1
**
*Step, name=Step-1, nlgeom=NO
*Static
1., 1., 1e-05, 1.
**
** BOUNDARY CONDITIONS
**
** Name: BC-2 Type: Displacement/Rotation
*Boundary
Set-2, 3, 3, -1.
**
** OUTPUT REQUESTS
**
*Restart, write, frequency=0
**
** FIELD OUTPUT: F-Output-1
**
*Output, field, variable=PRESELECT
**
** HISTORY OUTPUT: H-Output-1
**
*Output, history, variable=PRESELECT
*End Step
