*Heading
** TRC FE2 Model - Version CORRIGÉE avec éléments MASS
** Résolution du problème: "nodes missing degree of freedoms"
** Solution: Ajout d'éléments MASS aux nœuds de référence 1076-1219
**
** Matériaux:
** - MATRICE (béton): E=30000 MPa, nu=0.2
** - FIBRE (verre): E=72000 MPa, nu=0.22
**
** Conditions aux limites:
** - Encastrement: face y=0
** - Déplacement imposé: 1mm en Y sur face y=99
**
*Preprint, echo=NO, model=NO, history=NO, contact=NO
**
** =============================================================
** PART: MACRO MODEL (beam)
** =============================================================
*Part, name=BEAM
*Node
     1,   0.0000000000,   0.0000000000,   0.0000000000
     2,   5.5000000000,   0.0000000000,   0.0000000000
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**
** Solid elements (macro)
*Element, type=C3D8R
     1,      1,      2,      4,      3,     39,     40,     42,     41
     2,      3,      4,      6,      5,     41,     42,     44,     43
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**
** =============================================================
** MASS ELEMENTS pour les nœuds de référence (CORRECTION)
** Ces éléments donnent des DDL aux nœuds orphelins 1076-1219
** Numérotation: éléments 2001-2144 (pour éviter conflits)
** =============================================================
*Element, type=MASS
  2001, 1076
  2002, 1077
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**
** Node sets
*Nset, nset=NSET_BOTTOM
  1, 2, 39, 40
*Nset, nset=NSET_TOP
 37, 38, 75, 76
*Nset, nset=RP_NODES, generate
 1076, 1219, 1
**
** Element sets
*Elset, elset=ELSET_SOLID, generate
  1, 18, 1
*Elset, elset=ELSET_MASS, generate
  2001, 2144, 1
**
** Section assignment - Solid
*Solid Section, elset=ELSET_SOLID, material=MATRICE
,
**
** Section assignment - Mass (masse très petite, juste pour DDL)
*Mass, elset=ELSET_MASS
1.0e-12,
**
*End Part
**
** =============================================================
** ASSEMBLY
** =============================================================
*Assembly, name=Assembly
**
*Instance, name=BEAM-1, part=BEAM
*End Instance
**
** Boundary condition sets
*Nset, nset=BC_ENCASTRE, instance=BEAM-1
  1, 2, 39, 40
*Nset, nset=BC_DEPLACEMENT, instance=BEAM-1
 37, 38, 75, 76
**
*End Assembly
**
** =============================================================
** MATERIALS
** =============================================================
**
** Matériau MATRICE (béton)
*Material, name=MATRICE
*Elastic
30000., 0.2
**
** Matériau FIBRE (verre) - pour référence
*Material, name=FIBRE
*Elastic
72000., 0.22
**
** =============================================================
** BOUNDARY CONDITIONS (Initial)
** =============================================================
**
** Encastrement sur la face y=0
*Boundary
BC_ENCASTRE, ENCASTRE
**
** =============================================================
** STEP
** =============================================================
*Step, name=Step-1, nlgeom=NO
*Static
0.1, 1., 1e-05, 0.1
**
** Déplacement imposé de 1mm en direction Y sur face y=99
*Boundary
BC_DEPLACEMENT, 2, 2, 1.0
**
** OUTPUT REQUESTS
*Restart, write, frequency=0
**
** FIELD OUTPUT
*Output, field
*Node Output
U, RF
*Element Output, directions=YES
S, E, MISES
**
** HISTORY OUTPUT
*Output, history, variable=PRESELECT
*End Step
