*Heading
** TRC Macro Model 3D - Pour couplage DFE2
** Dimensions: 5.5 x 99.0 x 6.69 mm (L x W x H)
** Correspond à 1 x 18 x 1 = 18 VER
** Chaque VER: 5.5 x 5.5 x 6.69 mm
** Elements C3D8R (hexaedres lineaires, integration reduite)
** Maillage: 1 x 18 x 1 elements = 18 elements
** Noeuds: 76
**
*Preprint, echo=NO, model=NO, history=NO, contact=NO
**
** =============================================================
** PART DEFINITION - Macro plate (18 VER)
** =============================================================
**
*Part, name=MACRO_PLATE
*Node
     1,     0.000000,     0.000000,     0.000000
     2,     5.500000,     0.000000,     0.000000
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**
*Element, type=C3D8R
    1,     1,     2,     4,     3,    39,    40,    42,    41
    2,     3,     4,     6,     5,    41,    42,    44,    43
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**
** -------------------------------------------------------------
** NODE SETS
** -------------------------------------------------------------
*Nset, nset=FACE_X0
1, 3, 5, 7, 9, 11
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*Nset, nset=FACE_XL
2, 4, 6, 8, 10, 12
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*Nset, nset=FACE_Y0
1, 2, 39, 40
*Nset, nset=FACE_YW
37, 38, 75, 76
*Nset, nset=FACE_Z0
1, 2, 3, 4, 5, 6
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*Nset, nset=FACE_ZH
39, 40, 41, 42, 43, 44
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*Nset, nset=ALL_NODES, generate
 1, 76, 1
*Elset, elset=ALL_ELEMENTS, generate
 1, 18, 1
**
*End Part
**
** =============================================================
** ASSEMBLY
** =============================================================
**
*Assembly, name=Assembly
**
*Instance, name=PLATE-1, part=MACRO_PLATE
*End Instance
**
*End Assembly
**
** =============================================================
** MATERIALS (Placeholder - sera remplacé par réponse RVE)
** =============================================================
**
*Material, name=TRC_Homogenized
*Elastic
 51250., 0.183
**
** =============================================================
** SECTION ASSIGNMENT
** =============================================================
**
*Solid Section, elset=PLATE-1.ALL_ELEMENTS, material=TRC_Homogenized
 1.,
**
** =============================================================
** BOUNDARY CONDITIONS
** =============================================================
**
** Face X=0 fixée
*Boundary
PLATE-1.FACE_X0, ENCASTRE
**
** =============================================================
** STEP
** =============================================================
**
*Step, name=Step-1, nlgeom=NO
*Static
1., 1., 1e-05, 1.
**
** Déplacement imposé en X=L
*Boundary
PLATE-1.FACE_XL, 1, 1, 0.5
**
** OUTPUT REQUESTS
**
*Restart, write, frequency=0
**
*Output, field
*Node Output
U, RF
*Element Output
S, E, IVOL
**
*End Step
