*Heading
** TRC Macro Model - Corrected Version
** Modèle simplifié pour validation avant FE2
** Matériau homogénéisé: MATRICE (béton) avec propriétés demandées
** Encastrement en y=0, Déplacement imposé 1mm en y=99
**
*Preprint, echo=NO, model=NO, history=NO, contact=NO
**
** =============================================================
** PART: MACRO MODEL (poutre TRC)
** =============================================================
*Part, name=BEAM
*Node
     1,   0.0000000000,   0.0000000000,   0.0000000000
     2,   5.5000000000,   0.0000000000,   0.0000000000
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**
*Element, type=C3D8R
     1,      1,      2,      4,      3,     39,     40,     42,     41
     2,      3,      4,      6,      5,     41,     42,     44,     43
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**
** Node sets for boundary conditions
*Nset, nset=NSET_BOTTOM, generate
  1, 2, 1
 39, 40, 1
*Nset, nset=NSET_TOP, generate
 37, 38, 1
 75, 76, 1
*Nset, nset=NSET_ALL, generate
  1, 76, 1
**
** Element set
*Elset, elset=ELSET_ALL, generate
  1, 18, 1
**
** Section assignment
*Solid Section, elset=ELSET_ALL, material=TRC_HOMOGENISE
,
*End Part
**
** =============================================================
** ASSEMBLY
** =============================================================
*Assembly, name=Assembly
**
*Instance, name=BEAM-1, part=BEAM
*End Instance
**
** Assembly node sets for BC
*Nset, nset=BC_ENCASTRE, instance=BEAM-1
  1, 2, 39, 40
*Nset, nset=BC_DEPLACEMENT, instance=BEAM-1
 37, 38, 75, 76
**
*End Assembly
**
** =============================================================
** MATERIALS
** =============================================================
**
** Matériau homogénéisé TRC (composite matrice + fibre)
** Propriétés moyennées basées sur:
** - MATRICE (béton): E=30000 MPa, nu=0.2
** - FIBRE (verre): E=72000 MPa, nu=0.22
** Fraction volumique fibre ~5%: E_eff ≈ 32100 MPa
*Material, name=TRC_HOMOGENISE
*Elastic
32100., 0.2
**
** Matériau MATRICE seul (béton)
*Material, name=MATRICE
*Elastic
30000., 0.2
**
** Matériau FIBRE seul (verre)
*Material, name=FIBRE
*Elastic
72000., 0.22
**
** =============================================================
** BOUNDARY CONDITIONS
** =============================================================
**
** Encastrement sur la face y=0 (nœuds 1, 2, 39, 40)
*Boundary
BC_ENCASTRE, ENCASTRE
**
** =============================================================
** STEP
** =============================================================
*Step, name=Step-1, nlgeom=NO
*Static
0.1, 1., 1e-05, 0.1
**
** Déplacement imposé de 1mm en direction Y sur face y=99
*Boundary
BC_DEPLACEMENT, 2, 2, 1.0
**
** OUTPUT REQUESTS
*Restart, write, frequency=0
**
** FIELD OUTPUT
*Output, field
*Node Output
U, RF
*Element Output, directions=YES
S, E, MISES
**
** HISTORY OUTPUT
*Output, history, variable=PRESELECT
*End Step
