*Heading
** TRC RVE - Volume Elementaire Representatif
** Extrait de Job-1.inp - Fibre cylindrique dans matrice
** Dimensions: 5.5 x 5.5 x 6.69000006 mm
** Origine: (0, 0, 0)
** Fibre centree en (2.75, 2.75)
**
*Preprint, echo=NO, model=NO, history=NO, contact=NO
**
** =============================================================
** PART: MATRICE
** =============================================================
*Part, name=Matrice
*Node
1, 3.1329994000, 2.7500000000, 0.0000000000
2, 3.0208206000, 3.0208225000, 0.0000000000
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**
*Element, type=C3D8R
1, 30, 31, 68, 58, 166, 167, 204, 194
2, 95, 50, 77, 101, 231, 186, 213, 237
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**
** Node sets for PBC
*Nset, nset=FACE_XN
10, 12, 34, 35, 36, 37
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*Nset, nset=FACE_XP
9, 11, 20, 21, 22, 23
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*Nset, nset=FACE_YN
11, 12, 27, 28, 29, 30
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*Nset, nset=FACE_YP
9, 10, 13, 14, 15, 16
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*Nset, nset=FACE_ZN
1, 2, 3, 4, 5, 6
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*Nset, nset=FACE_ZP
1361, 1362, 1363, 1364, 1365, 1366
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**
** Corner nodes
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*Elset, elset=ALL_ELEMENTS, generate
 1, 1160, 1
*End Part
**
** =============================================================
** PART: FIBRE (centrée dans le VER)
** =============================================================
*Part, name=Fibre
*Node
1, 3.1242472530, 2.6685874909, 0.0000000000
2, 3.1088517310, 2.8838447780, 0.0000000000
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**
*Element, type=C3D8R
1, 76, 105, 88, 87, 11, 40, 23, 22
2, 89, 75, 74, 107, 24, 10, 9, 42
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*End Part
**
** =============================================================
** ASSEMBLY
** =============================================================
*Assembly, name=Assembly
**
*Instance, name=MATRICE-1, part=Matrice
*End Instance
**
*Instance, name=FIBRE-1, part=Fibre
*End Instance
**
*End Assembly
**
** =============================================================
** MATERIALS
** =============================================================
**
*Material, name=Fibre
*Elastic
 200000., 0.2
**
*Material, name=Matrice
*Elastic
 25000., 0.18
**
** =============================================================
** SECTION ASSIGNMENTS
** =============================================================
**
*Solid Section, elset=MATRICE-1.ALL_ELEMENTS, material=Matrice
 1.,
*Solid Section, elset=FIBRE-1.ALL_ELEMENTS, material=Fibre
 1.,
**
** =============================================================
** RVE PROPERTIES (for DFE2 reference)
** =============================================================
** B_RVE = 5.5 mm (X direction)
** H_RVE = 5.5 mm (Y direction)
** T_RVE = 6.69000006 mm (Z direction)
** V_RVE = 202.372501815 mm^3
**
